# Расчёт основных характеристик структурной схемы
R_а := 64.7  # (Ом)
P_а := 10  # (Вт)
X_a := 702  # (Ом)
η_пф := 0.8
Q_c := 100
η_асу := R_а/(R_а + |X_a|/Q_c) explicit, ALL → 64.7/(64.7 + |702|/100) = 0.902119
η_асу := 0.9
P_ок := P_а/(η_асу*η_пф) explicit, ALL → 10/(0.9*0.8) = 13.8889  # (Вт)
P_ок := 13.9
# Подбор транзистора: KT902AM
f_1 := 10  # (МГц)
f := 12.645  # (МГц)
P_1 := 30  # (Вт)
P := 13.9  # (Вт)
E_k1 := 28  # (В)
E_k := 24  # (В)
K_p1 := 9
K_p := K_p1*(f_1/f)^2*(E_k/E_k1)^2*P_1/P explicit, ALL → 9*(10/12.645)^2*(24/28)^2*30/13.9 = 8.9252
η_пк := 0.8
P_ок.вх := P_ок/K_p = 1.55739
P_пк := P_ок.вх/η_пк = 1.94674
P_пк.вх := P_пк/K_p = 0.218117
# Расчёт оконечного каскада | KT902AM
P_1 := 13.9  # (Вт)
U_кэ.доп := 110
E_к := 24
r_нас := 0.8
U_бэ.доп := 5
α_0 := 0.318
r_б := 2
I_к0.доп := 5
α_1 := 0.5
r_э := 0
I_б0.доп := 2
γ_0 := 0.318
R_уэ := 50
t_n.доп := 150
γ_1 := 0.5
h_210 := 30
R_nk := 3
E := 0.7
f_m := 35*10^6
f := 17.35*10^6
C_к := 150*10^-12
C_э := 1500*10^-12
L_э := 20*10^-9
L_б := 20*10^-9
L_к := 5*10^-9
# Расчёт коллекторной цепи
U_к.кр := E_к*(0.5 + 0.5*sqrt(1 - 8*r_нас*P_1/(α_1*E_к^2))) = 21.976
U_к1.max := 0.9*U_к.кр = 19.7784
U_к.полн := E_к + 1.2*U_к1.max = 47.734  # <
U_кэ.доп = 110  # !!!!!!!!!!!!
I_к1 := 2*P_1/U_к1.max = 1.40558
I_к0 := I_к1*α_0/α_1 = 0.893946  # <
I_к0.доп = 5  # !!!!!!!!!!!!
I_к.max := I_к0/α_0 = 2.81115  # <
I_к0.доп = 5  # !!!!!!!!!!!!
P_0 := E_к*I_к0 = 21.4547
P_к := P_0 - P_1 = 7.55471
η := P_1/P_0 = 0.647877
R_эк := U_к1.max^2/(2*P_1) = 14.0714
P_1.ср := 0.1*P_1 = 1.39
P_0.ср := 0.224*P_0 = 4.80585
P_к.ср := P_0.ср - P_1.ср = 3.41585
η_ср := P_1.ср/P_0.ср = 0.289231
# Расчёт входной цепи
R_д := h_210/(2*π*f_m*C_э*(1 - h_210/(2*π*f_m*C_э*R_уэ))) = -111.056
x := 1 + γ_1*2*π*f_m*C_к*R_эк = 1.23208
I_б := x*I_к1*sqrt(1 + (h_210*f/f_m)^2)/(h_210*γ_1) = 1.72082
R_д := 15
U_бэ.max := |-I_б*(R_д/sqrt(1 + (h_210*f/f_m)^2)) + E| = 1.03179
# <
U_бэ.доп = 5
I_б0 := I_к0/h_210 = 0.0297982
I_э0 := I_б0 + I_к0 = 0.923744
L_вх.оэ := L_б + L_э/x = 3.62327e-8
r_вх.оэ := ((1 + γ_1*2*π*f*C_к*R_эк)*r_б + r_э + γ_1*2*π*f_m*L_э)/x = 3.59489
R_вх.оэ := (r_б + (1 + γ_1*h_210)*r_э)/x - r_вх.оэ + R_д*(1 - γ_1) = 5.52837
C_вх.оэ := h_210/(2*π*f_m*R_вх.оэ) = 2.46761e-8
R_вх := r_вх.оэ + R_вх.оэ/(1 + (h_210*f/f_m)^2) = 3.61978
X_вх := 2*π*f*L_вх.оэ - R_вх.оэ*(h_210*f/f_m)/(1 + (h_210*f/f_m)^2) = 3.57977
P_вх := 0.5*I_б^2*R_вх = 5.35949
t_ком := 27
K_p := P_1/P_вх = 2.59353
t_n := t_ком + (P_вх + P_к)*R_nk = 65.7426
# Расчёт схемы смещения
F_в := 3400
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R_2 := (x - 1)*R_д - (r_б + (1 + h_210)*r_э) = 1.48126
R_1 := (E_к/E - 1)*R_2 = 49.3049
C_бл.max := 0.1*(R_1 + R_2)/(2*π*F_в*R_1*R_2) = 3.2551e-6
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I_q := E_к/(R_1 + R_2) = 0.47257
P_nk := P_вх/0.65 = 8.24536
R_авт := x*R_д - (r_б + (1 + h_210)*r_э) = 16.4813
R_авт := 18  # (E24)
L_бл.доп := 0.1*R_авт/(2*π*F_в) = 8.42585e-5
L_бл := 100*sqrt(R_вх^2 + X_вх^2)/(2*π*f) = 4.67001e-6
Cбл := 100/(2*π*f*R_д) = 6.11546e-8
С_бл := 68*10^-9 = 6.8e-8  # (E24)
# Расчет ВКС
α_доп := -40
α_су := -5
α_1 = 0.5
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α_2 := 0.212
α_г2 := 20*log(α_2/α_1) = -7.45268
α_ф2 := -α_доп + α_су + α_г2 = 27.5473
m_опт := α_ф2*0.05 = 1.37737
m_опт2 := α_ф2*0.1 = 2.75473
R_эк = 14.0714  # R1
R_0 := 5
R_а = 64.7  # R2
X_C1 := R_эк/sqrt(R_эк/R_0 - 1) = 10.4468
|X_C1| = 10.4468
X_C2 := R_а/sqrt(R_а/R_0 - 1) = 18.7242
X_L1 := R_эк*(sqrt(R_эк/R_0 - 1) + sqrt(R_а/R_0 - 1)) = 67.5761
C_1 := 1/(2*π*f*X_C1) = 8.78083e-10
C_2 := 1/(2*π*f*X_C2) = 4.89913e-10
L_1 := X_L1/(2*π*f) = 6.19889e-7
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R_3 := 65
X_L2 := R_а*sqrt(R_3/R_а - 1) = 4.40568
R_а = 64.7
X_c2 := R_3/sqrt(R_3/R_а - 1) = 954.564
L_2 := X_L2/(2*π*f) = 4.04141e-8
c_2 := 1/(2*π*f*X_c2) = 9.60983e-12
