# Расчёт основных характеристик структурной схемы
R_а := 31.6  # (Ом)
P_а := 15  # (Вт)
X_a := 100  # (Ом)
η_пф := 0.8
Q_c := 150
η_асу := R_а/(R_а + |X_a|/Q_c) explicit, ALL → 31.6/(31.6 + |100|/150) = 0.979339
η_асу := 0.95
P_ок := P_а/(η_асу*η_пф) explicit, ALL → 15/(0.95*0.8) = 19.7368  # (Вт)
# Подбор транзистора: KT902AM
f_1 := 10  # (МГц)
f := 12.645  # (МГц)
P_1 := 30  # (Вт)
P := 20  # (Вт)
E_k1 := 28  # (В)
E_k := 24  # (В)
K_p1 := 9
K_p := K_p1*(f_1/f)^2*(E_k/E_k1)^2*P_1/P explicit, ALL → 9*(10/12.645)^2*(24/28)^2*30/20 = 6.20301
η_пк := 0.75
P_ок.вх := P_ок/K_p = 3.18182
P_пк := P_ок.вх/η_пк = 4.24242
P_пк.вх := P_пк/K_p = 0.68393
# Расчёт оконечного каскада | KT902AM
P_1 := 20  # (Вт)
U_кэ.доп := 110
E_к := 24
r_нас := 0.8
U_бэ.доп := 5
α_0 := 0.318
r_б := 2
I_к0.доп := 5
α_1 := 0.5
r_э := 0
I_б0.доп := 2
γ_0 := 0.318
R_уэ := 50
t_n.доп := 150
γ_1 := 0.5
h_210 := 30
R_nk := 3
E := 0.7
f_m := 35*10^6
f := 12.645*10^6
C_к := 150*10^-12
C_э := 1500*10^-12
L_э := 20*10^-9
L_б := 20*10^-9
L_к := 5*10^-9
# Расчёт коллекторной цепи
U_к.кр := E_к*(0.5 + 0.5*sqrt(1 - 8*r_нас*P_1/(α_1*E_к^2))) = 20.9443
U_к1.max := 0.9*U_к.кр = 18.8498
U_к.полн := E_к + 1.2*U_к1.max = 46.6198
# <
U_кэ.доп = 110  # !!!!!!!!!!!!
I_к1 := 2*P_1/U_к1.max = 2.12203
I_к0 := I_к1*α_0/α_1 = 1.34961
# <
I_к0.доп = 5  # !!!!!!!!!!!!
I_к.max := I_к0/α_0 = 4.24407  # <
I_к0.доп = 5  # !!!!!!!!!!!!
P_0 := E_к*I_к0 = 32.3907
P_к := P_0 - P_1 = 12.3907
η := P_1/P_0 = 0.617461
R_эк := U_к1.max^2/(2*P_1) = 8.88292
P_1.ср := 0.1*P_1 = 2
P_0.ср := 0.224*P_0 = 7.25552
P_к.ср := P_0.ср - P_1.ср = 5.25552
η_ср := P_1.ср/P_0.ср = 0.275652
# Расчёт входной цепи
R_д := h_210/(2*π*f_m*C_э*(1 - h_210/(2*π*f_m*C_э*R_уэ))) = -111.056
x := 1 + γ_1*2*π*f_m*C_к*R_эк = 1.14651
I_б := x*I_к1*sqrt(1 + (h_210*f/f_m)^2)/(h_210*γ_1) = 1.76543
R_д := 15
U_бэ.max := |-I_б*(R_д/sqrt(1 + (h_210*f/f_m)^2)) + E| = 1.73293
# <
U_бэ.доп = 5
I_б0 := I_к0/h_210 = 0.0449871
I_э0 := I_б0 + I_к0 = 1.3946
L_вх.оэ := L_б + L_э/x = 3.74443e-8
r_вх.оэ := ((1 + γ_1*2*π*f*C_к*R_эк)*r_б + r_э + γ_1*2*π*f_m*L_э)/x = 3.75486
R_вх.оэ := (r_б + (1 + γ_1*h_210)*r_э)/x - r_вх.оэ + R_д*(1 - γ_1) = 5.48957
C_вх.оэ := h_210/(2*π*f_m*R_вх.оэ) = 2.48505e-8
R_вх := r_вх.оэ + R_вх.оэ/(1 + (h_210*f/f_m)^2) = 3.80119
X_вх := 2*π*f*L_вх.оэ - R_вх.оэ*(h_210*f/f_m)/(1 + (h_210*f/f_m)^2) = 2.47277
P_вх := 0.5*I_б^2*R_вх = 5.92369
t_ком := 27
K_p := P_1/P_вх = 3.37627
t_n := t_ком + (P_вх + P_к)*R_nk = 81.9432
# Расчёт схемы смещения
F_в := 3400
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R_2 := (x - 1)*R_д - (r_б + (1 + h_210)*r_э) = 0.197637
R_1 := (E_к/E - 1)*R_2 = 6.5785
C_бл.max := 0.1*(R_1 + R_2)/(2*π*F_в*R_1*R_2) = 2.43965e-5
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I_q := E_к/(R_1 + R_2) = 3.54184
P_nk := P_вх/0.65 = 9.11337
R_авт := x*R_д - (r_б + (1 + h_210)*r_э) = 15.1976
R_авт := 16  # (E24)
L_бл.доп := 0.1*R_авт/(2*π*F_в) = 7.48964e-5
L_бл := 100*sqrt(R_вх^2 + X_вх^2)/(2*π*f) = 5.70757e-6
Cбл := 100/(2*π*f*R_д) = 8.39093e-8
С_бл := 82*10^-9 = 8.2e-8  # (E24)
