# Расчёт основных характеристик структурной схемы
R_а := 64.7  # (Ом)
P_а := 10  # (Вт)
X_a := 702  # (Ом)
η_пф := 0.8
Q_c := 100
η_асу := R_а/(R_а + |X_a|/Q_c) explicit, ALL → 64.7/(64.7 + |702|/100) = 0.902119
η_асу := 0.9
P_ок := P_а/(η_асу*η_пф) explicit, ALL → 10/(0.9*0.8) = 13.8889  # (Вт)
P_ок := 13.9
# Подбор транзистора: KT902AM | 2T912A
f_1 := 30  # (МГц)
f := 17.35  # (МГц)
P_1 := 70  # (Вт)
P := 13.9  # (Вт)
E_k1 := 27  # (В)
E_k := 5  # (В)
K_p1 := 10
K_p := K_p1*(f_1/f)^2*(E_k/E_k1)^2*P_1/P explicit, ALL → 10*(30/17.35)^2*(5/27)^2*70/13.9 = 5.16344
η_пк := 0.8
P_ок.вх := P_ок/K_p = 2.692
P_пк := P_ок.вх/η_пк = 3.365
P_пк.вх := P_пк/K_p explicit, ALL → 3.36500366802/5.16344162271 = 0.651698
# Расчёт оконечного каскада | 2T912A
P_1 := 13.9  # (Вт)
U_кэ.доп := 70
E_к := 5
.
r_нас := 0.05
U_бэ.доп := 5
α_0 := 0.318
r_б := 0.5
I_к0.доп := 20
α_1 := 0.5
r_э := 0
I_б0.доп := 20
γ_0 := 0.318
R_уэ := 20
t_n.доп := 150
γ_1 := 0.5
h_210 := 10
R_nk := 1.42
E := 0.7
f_m := 90*10^6
f := 17.35*10^6
C_к := 150*10^-12
C_э := 1200*10^-12
L_э := 5*10^-9
L_б := 5*10^-9
L_к := 5*10^-9
# Расчёт коллекторной цепи
U_к.кр := (E_к*(0.5 + 0.5*sqrt(1 - 8*r_нас*P_1/(α_1*E_к^2)))) = 4.36279
U_к1.max := 0.9*U_к.кр = 3.92651
U_к.полн := E_к + 1.2*U_к1.max = 9.71182
# <
U_кэ.доп = 70  # !!!!!!!!!!!!
I_к1 := 2*P_1/U_к1.max = 7.08007
I_к0 := I_к1*α_0/α_1 = 4.50293  # <
I_к0.доп = 20  # !!!!!!!!!!!!
I_к.max := I_к0/α_0 = 14.1601  # <
I_б0.доп = 20  # !!!!!!!!!!!!
P_0 := E_к*I_к0 = 22.5146
P_к := P_0 - P_1 = 8.61463
η := P_1/P_0 = 0.617376
R_эк := U_к1.max^2/(2*P_1) = 0.554587
P_1.ср := 0.1*P_1 = 1.39
P_0.ср := 0.224*P_0 = 5.04328
P_к.ср := P_0.ср - P_1.ср = 3.65328
η_ср := P_1.ср/P_0.ср = 0.275614
# Расчёт входной цепи
R_д := h_210/(2*π*f_m*C_э*(1 - h_210/(2*π*f_m*C_э*R_уэ))) = 55.9961
x := 1 + γ_1*2*π*f_m*C_к*R_эк = 1.02352
I_б := x*I_к1*sqrt(1 + (h_210*f/f_m)^2)/(h_210*γ_1) = 3.1475
U_бэ.max := |-I_б*(R_д/sqrt(1 + (h_210*f/f_m)^2)) + E| = 80.4562  # <
U_бэ.доп = 5
R_д := 3.9
U_бэ.max := |-I_б*(R_д/sqrt(1 + (h_210*f/f_m)^2)) + E| = 4.95235
# <
U_бэ.доп = 5
I_б0 := I_к0/h_210 = 0.450293
I_э0 := I_б0 + I_к0 = 4.95322
L_вх.оэ := L_б + L_э/x = 9.8851e-9
r_вх.оэ := ((1 + γ_1*2*π*f*C_к*R_эк)*r_б + r_э + γ_1*2*π*f_m*L_э)/x = 1.87195
R_вх.оэ := (r_б + (1 + γ_1*h_210)*r_э)/x - r_вх.оэ + R_д*(1 - γ_1) = 0.566556
C_вх.оэ := h_210/(2*π*f_m*R_вх.оэ) = 3.1213e-8
R_вх := r_вх.оэ + R_вх.оэ/(1 + (h_210*f/f_m)^2) = 1.99208
X_вх := 2*π*f*L_вх.оэ - R_вх.оэ*(h_210*f/f_m)/(1 + (h_210*f/f_m)^2) = 0.84603
P_вх := 0.5*I_б^2*R_вх = 9.86755
t_ком := 27
K_p := P_1/P_вх = 1.40866
t_n := t_ком + (P_вх + P_к)*R_nk = 53.2447
# Расчёт схемы смещения
F_в := 3400
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R_2 := (x - 1)*R_д - (r_б + (1 + h_210)*r_э) = -0.408269
R_1 := (E_к/E - 1)*R_2 = -2.50794
C_бл.max := 0.1*(R_1 + R_2)/(2*π*F_в*R_1*R_2) = -1.3332e-5
I_q := E_к/(R_1 + R_2) = -1.71456
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P_nk := P_вх/0.65 = 15.1808
R_авт := x*R_д - (r_б + (1 + h_210)*r_э) = 3.49173
R_авт := 3.6  # (E24)
L_бл.доп := 0.1*R_авт/(2*π*F_в) = 1.68517e-5
L_бл := 75*sqrt(R_вх^2 + X_вх^2)/(2*π*f) = 1.48901e-6
Cбл := 75/(2*π*f*R_д) = 1.76408e-7
С_бл := 180*10^-9  # (E24)
# Расчет выходной колебательной системы
